// SBML level 3 version 1

model Cusotm_Circuit()
  // Created by iBioSim flatten routine
  // model units - substance: mole, volume: litre

  // Compartments:
  compartment Cell = 1;

  // Species:
  substanceOnly species $LacI in Cell = 0;
  substanceOnly species TetR in Cell = 0;
  substanceOnly species Cro in Cell = 0;
  substanceOnly species GFP in Cell = 0;
  substanceOnly species P0 in Cell = 2;
  substanceOnly species P1 in Cell = 2;
  substanceOnly species P2 in Cell = 2;

  // Parameters:
  kd = 0.0075; kd is "Degradation rate";
  kr_f = 0.5; kr_f is "Forward repression binding rate";
  kr_r = 1; kr_r is "Reverse repression binding rate";
  ka_f = 0.0033; ka_f is "Forward activation binding rate";
  ka_r = 1; ka_r is "Reverse activation binding rate";
  ko_f = 0.033; ko_f is "Forward RNAP binding rate";
  ko_r = 1; ko_r is "Reverse RNAP binding rate";
  kao_f = 1; kao_f is "Forward activated RNAP binding rate";
  kao_r = 1; kao_r is "Reverse activated RNAP binding rate";
  nc = 2; nc is "Stoichiometry of binding";
  nr = 30; nr is "Initial RNAP count";
  ko = 0.05; ko is "Open complex production rate";
  kb = 0.0001; kb is "Basal production rate";
  ng = 2; ng is "Initial promoter count";
  np = 10; np is "Stoichiometry of production";
  ka = 0.25; ka is "Activated production rate";
  High = 30;
  HighTime = 1000;
  Low = 0;
  LowTime = 1500;

  // Reactions:
  Degradation_GFP: GFP => ; Degradation_GFP_kd*GFP;
    Degradation_GFP_kd = 0.0075 u_1_second_n1;
  Degradation_Cro: Cro => ; Degradation_Cro_kd*Cro;
    Degradation_Cro_kd = 0.0075 u_1_second_n1;
  Degradation_TetR: TetR => ; Degradation_TetR_kd*TetR;
    Degradation_TetR_kd = 0.0075 u_1_second_n1;
  Degradation_LacI: $LacI => ; Degradation_LacI_kd*LacI;
    Degradation_LacI_kd = 0.0075 u_1_second_n1;
  R_abstracted_production_P0: => 10 TetR; ko__P0*ng__P0*Ko__P0*R_abstracted_production_P0_RNAP/(1 + Ko__P0*R_abstracted_production_P0_RNAP + (Kr__LacI_P0*LacI)^nc__LacI_P0);  // modifiers: LacI
    R_abstracted_production_P0_RNAP = 30 u_1_mole_n1; ng__P0 = 2 u_1_mole_n1; Ko__P0 = 0.033 u_1_mole_n1; ko__P0 = 0.05 u_1_second_n1; nc__LacI_P0 = 2 dimensionless; Kr__LacI_P0 = 0.5 u_1_mole_n1;
  R_abstracted_production_P1: => 10 Cro; ko__P1*ng__P1*Ko__P1*R_abstracted_production_P1_RNAP/(1 + Ko__P1*R_abstracted_production_P1_RNAP + (Kr__TetR_P1*TetR)^nc__TetR_P1);  // modifiers: TetR
    R_abstracted_production_P1_RNAP = 30 u_1_mole_n1; ng__P1 = 2 u_1_mole_n1; Ko__P1 = 0.033 u_1_mole_n1; ko__P1 = 0.05 u_1_second_n1; nc__TetR_P1 = 2 dimensionless; Kr__TetR_P1 = 0.5 u_1_mole_n1;
  R_abstracted_production_P2: => 10 GFP; ko__P2*ng__P2*Ko__P2*R_abstracted_production_P2_RNAP/(1 + Ko__P2*R_abstracted_production_P2_RNAP + (Kr__Cro_P2*Cro)^nc__Cro_P2);  // modifiers: Cro
    R_abstracted_production_P2_RNAP = 30 u_1_mole_n1; ng__P2 = 2 u_1_mole_n1; Ko__P2 = 0.033 u_1_mole_n1; ko__P2 = 0.05 u_1_second_n1; nc__Cro_P2 = 2 dimensionless; Kr__Cro_P2 = 0.5 u_1_mole_n1;

  // Events:
  event0: at (time >= HighTime), persistent=false: LacI = High;
  event1: at (time >= LowTime), persistent=false: LacI = Low;

  // Unit definitions:
  unit u_1_second_n1 = 1 / second;
  unit u_1_mole_n1 = 1 / mole;
end
