// SBML level 3 version 1

model not()
  // Created by iBioSim flatten routine
  // model units - substance: mole, volume: litre

  // Compartments:
  compartment Cell = 1;

  // Species:
  substanceOnly species GFP in Cell = 0;
  substanceOnly species $TetR in Cell = 0;
  substanceOnly species Promoter_GFP in Cell = 2;

  // Parameters:
  ko_r = 1; ko_r is "Reverse RNAP binding rate";
  nr = 30; nr is "Initial RNAP count";
  np = 10; np is "Stoichiometry of production";
  kr_r = 1; kr_r is "Reverse repression binding rate";
  ka_f = 0.0033; ka_f is "Forward activation binding rate";
  kecdiff = 1; kecdiff is "Extracellular diffusion rate";
  ko = 0.05; ko is "Open complex production rate";
  kmdiff_f = 1; kmdiff_f is "Forward membrane diffusion rate";
  kecd = 0.005; kecd is "Extracellular degradation rate";
  kc_r = 1; kc_r is "Reverse complex formation rate";
  kr_f = 0.5; kr_f is "Forward repression binding rate";
  ka_r = 1; ka_r is "Reverse activation binding rate";
  nc = 2; nc is "Stoichiometry of binding";
  kao_r = 1; kao_r is "Reverse activated RNAP binding rate";
  kd = 0.0075; kd is "Degradation rate";
  kb = 0.0001; kb is "Basal production rate";
  ng = 2; ng is "Initial promoter count";
  ka = 0.25; ka is "Activated production rate";
  kao_f = 1; kao_f is "Forward activated RNAP binding rate";
  kmdiff_r = 0.01; kmdiff_r is "Reverse membrane diffusion rate";
  ko_f = 0.033; ko_f is "Forward RNAP binding rate";
  kc_f = 0.05; kc_f is "Forward complex formation rate";
  High = 60;
  HighTime = 1000;

  // Reactions:
  Degradation_GFP: GFP => ; Degradation_GFP_kd*GFP;
    Degradation_GFP_kd = 0.0075 u_1_second_n1;
  Degradation_TetR: $TetR => ; Degradation_TetR_kd*TetR;
    Degradation_TetR_kd = 0.0075 u_1_second_n1;
  R_abstracted_production_Promoter_GFP: => 10 GFP; ko__Promoter_GFP*ng__Promoter_GFP*Ko__Promoter_GFP*RNAP/(1 + Ko__Promoter_GFP*RNAP + (Kr__TetR_Promoter_GFP*TetR)^nc__TetR_Promoter_GFP);  // modifiers: TetR
    RNAP = 30 u_1_mole_n1; ng__Promoter_GFP = 2 u_1_mole_n1; Ko__Promoter_GFP = 0.033 u_1_mole_n1; ko__Promoter_GFP = 0.05 u_1_second_n1; nc__TetR_Promoter_GFP = 2 dimensionless; Kr__TetR_Promoter_GFP = 0.5 u_1_mole_n1;

  // Events:
  event0: at (time >= HighTime): TetR = High;

  // Unit definitions:
  unit u_1_second_n1 = 1 / second;
  unit u_1_mole_n1 = 1 / mole;
end
