// SBML level 3 version 1

model and()
  // Created by iBioSim flatten routine
  // model units - substance: mole, volume: litre

  // Compartments:
  compartment Cell = 1;

  // Species:
  substanceOnly species CI in Cell = 0;
  substanceOnly species GFP in Cell = 0;
  substanceOnly species $LacI in Cell = 0;
  substanceOnly species $TetR in Cell = 0;
  substanceOnly species Promoter_GFP in Cell = 2;
  substanceOnly species P1 in Cell = 4;
  substanceOnly species P3 in Cell = 2;
  substanceOnly species P3_mRNA in Cell = 0;
  substanceOnly species P2 in Cell = 2;

  // Parameters:
  ko_r = 1; ko_r is "Reverse RNAP binding rate";
  nr = 30; nr is "Initial RNAP count";
  np = 10; np is "Stoichiometry of production";
  kr_r = 1; kr_r is "Reverse repression binding rate";
  ka_f = 0.0033; ka_f is "Forward activation binding rate";
  kecdiff = 1; kecdiff is "Extracellular diffusion rate";
  ko = 0.05; ko is "Open complex production rate";
  kmdiff_f = 1; kmdiff_f is "Forward membrane diffusion rate";
  kecd = 0.005; kecd is "Extracellular degradation rate";
  kc_r = 1; kc_r is "Reverse complex formation rate";
  kr_f = 0.5; kr_f is "Forward repression binding rate";
  ka_r = 1; ka_r is "Reverse activation binding rate";
  nc = 2; nc is "Stoichiometry of binding";
  kao_r = 1; kao_r is "Reverse activated RNAP binding rate";
  kd = 0.0075; kd is "Degradation rate";
  kb = 0.0001; kb is "Basal production rate";
  ng = 2; ng is "Initial promoter count";
  ka = 0.255; ka is "Activated production rate";
  kao_f = 1; kao_f is "Forward activated RNAP binding rate";
  kmdiff_r = 0.01; kmdiff_r is "Reverse membrane diffusion rate";
  ko_f = 0.033; ko_f is "Forward RNAP binding rate";
  kc_f = 0.05; kc_f is "Forward complex formation rate";
  High = 60;
  HighTime = 2000;
  HighTime2 = 4000;

  // Reactions:
  Degradation_GFP: GFP => ; Degradation_GFP_kd*GFP;
    Degradation_GFP_kd = 0.0075 u_1_second_n1;
  Degradation_CI: CI => ; Degradation_CI_kd*CI;
    Degradation_CI_kd = 0.0075 u_1_second_n1;
  Degradation_TetR: $TetR => ; Degradation_TetR_kd*TetR;
    Degradation_TetR_kd = 0.0075 u_1_second_n1;
  Degradation_LacI: $LacI => ; Degradation_LacI_kd*LacI;
    Degradation_LacI_kd = 0.0075 u_1_second_n1;
  R_abstracted_production_P1: => 10 CI; ko__P1*ng__P1*Ko__P1*R_abstracted_production_P1_RNAP/(1 + Ko__P1*R_abstracted_production_P1_RNAP + (Kr__LacI_P1*LacI)^nc__LacI_P1);  // modifiers: LacI
    R_abstracted_production_P1_RNAP = 30 u_1_mole_n1; ng__P1 = 4 u_1_mole_n1; Ko__P1 = 0.033 u_1_mole_n1; ko__P1 = 0.05 u_1_second_n1; nc__LacI_P1 = 2 dimensionless; Kr__LacI_P1 = 0.5 u_1_mole_n1;
  R_abstracted_production_P2: => 10 CI; ko__P2*ng__P2*Ko__P2*R_abstracted_production_P2_RNAP/(1 + Ko__P2*R_abstracted_production_P2_RNAP + (Kr__TetR_P2*TetR)^nc__TetR_P2);  // modifiers: TetR
    R_abstracted_production_P2_RNAP = 30 u_1_mole_n1; ng__P2 = 2 u_1_mole_n1; Ko__P2 = 0.033 u_1_mole_n1; ko__P2 = 0.05 u_1_second_n1; nc__TetR_P2 = 2 dimensionless; Kr__TetR_P2 = 0.5 u_1_mole_n1;
  R_abstracted_production_Promoter_GFP: => 10 GFP; ko__Promoter_GFP*ng__Promoter_GFP*Ko__Promoter_GFP*R_abstracted_production_Promoter_GFP_RNAP/(1 + Ko__Promoter_GFP*R_abstracted_production_Promoter_GFP_RNAP + (Kr__CI_Promoter_GFP*CI)^nc__CI_Promoter_GFP);  // modifiers: CI
    R_abstracted_production_Promoter_GFP_RNAP = 30 u_1_mole_n1; ng__Promoter_GFP = 2 u_1_mole_n1; Ko__Promoter_GFP = 0.033 u_1_mole_n1; ko__Promoter_GFP = 0.05 u_1_second_n1; nc__CI_Promoter_GFP = 2 dimensionless; Kr__CI_Promoter_GFP = 0.5 u_1_mole_n1;

  // Events:
  event0: at (time >= HighTime): TetR = High;
  event1: at (time >= HighTime2): LacI = High;

  // Unit definitions:
  unit u_1_second_n1 = 1 / second;
  unit u_1_mole_n1 = 1 / mole;
end
