// SBML level 3 version 1

model or()
  // Created by iBioSim flatten routine
  // model units - substance: mole, volume: litre

  // Compartments:
  compartment Cell = 1;

  // Species:
  substanceOnly species CI in Cell = 0;
  substanceOnly species GFP in Cell = 0;
  substanceOnly species $LacI in Cell = 0;
  substanceOnly species $TetR in Cell = 0;
  substanceOnly species Cro in Cell = 0;
  substanceOnly species Promoter_CI in Cell = 2;
  substanceOnly species Promoter_Cro in Cell = 2;
  substanceOnly species P1 in Cell = 2;
  substanceOnly species P2 in Cell = 2;

  // Parameters:
  ko_r = 1; ko_r is "Reverse RNAP binding rate";
  nr = 30; nr is "Initial RNAP count";
  np = 10; np is "Stoichiometry of production";
  kr_r = 1; kr_r is "Reverse repression binding rate";
  ka_f = 0.0033; ka_f is "Forward activation binding rate";
  kecdiff = 1; kecdiff is "Extracellular diffusion rate";
  ko = 0.05; ko is "Open complex production rate";
  kmdiff_f = 1; kmdiff_f is "Forward membrane diffusion rate";
  kecd = 0.005; kecd is "Extracellular degradation rate";
  kc_r = 1; kc_r is "Reverse complex formation rate";
  kr_f = 0.5; kr_f is "Forward repression binding rate";
  ka_r = 1; ka_r is "Reverse activation binding rate";
  nc = 2; nc is "Stoichiometry of binding";
  kao_r = 1; kao_r is "Reverse activated RNAP binding rate";
  kd = 0.0075; kd is "Degradation rate";
  kb = 0.0001; kb is "Basal production rate";
  ng = 2; ng is "Initial promoter count";
  ka = 0.25; ka is "Activated production rate";
  kao_f = 1; kao_f is "Forward activated RNAP binding rate";
  kmdiff_r = 0.01; kmdiff_r is "Reverse membrane diffusion rate";
  ko_f = 0.033; ko_f is "Forward RNAP binding rate";
  kc_f = 0.05; kc_f is "Forward complex formation rate";
  High = 120;
  HighTime = 2000;
  HighTime2 = 4000;

  // Reactions:
  Degradation_GFP: GFP => ; Degradation_GFP_kd*GFP;
    Degradation_GFP_kd = 0.0075 u_1_second_n1;
  Degradation_Cro: Cro => ; Degradation_Cro_kd*Cro;
    Degradation_Cro_kd = 0.0075 u_1_second_n1;
  Degradation_CI: CI => ; Degradation_CI_kd*CI;
    Degradation_CI_kd = 0.0075 u_1_second_n1;
  Degradation_TetR: $TetR => ; Degradation_TetR_kd*TetR;
    Degradation_TetR_kd = 0.0075 u_1_second_n1;
  Degradation_LacI: $LacI => ; Degradation_LacI_kd*LacI;
    Degradation_LacI_kd = 0.0075 u_1_second_n1;
  R_abstracted_production_Promoter_CI: => 10 CI; ko__Promoter_CI*ng__Promoter_CI*Ko__Promoter_CI*R_abstracted_production_Promoter_CI_RNAP/(1 + Ko__Promoter_CI*R_abstracted_production_Promoter_CI_RNAP + (Kr__LacI_Promoter_CI*LacI)^nc__LacI_Promoter_CI);  // modifiers: LacI
    R_abstracted_production_Promoter_CI_RNAP = 30 u_1_mole_n1; ng__Promoter_CI = 2 u_1_mole_n1; Ko__Promoter_CI = 0.033 u_1_mole_n1; ko__Promoter_CI = 0.05 u_1_second_n1; nc__LacI_Promoter_CI = 2 dimensionless; Kr__LacI_Promoter_CI = 0.5 u_1_mole_n1;
  R_abstracted_production_P1: => 10 GFP; ko__P1*ng__P1*Ko__P1*R_abstracted_production_P1_RNAP/(1 + Ko__P1*R_abstracted_production_P1_RNAP + (Kr__CI_P1*CI)^nc__CI_P1);  // modifiers: CI
    R_abstracted_production_P1_RNAP = 30 u_1_mole_n1; ng__P1 = 2 u_1_mole_n1; Ko__P1 = 0.033 u_1_mole_n1; ko__P1 = 0.05 u_1_second_n1; nc__CI_P1 = 2 dimensionless; Kr__CI_P1 = 0.5 u_1_mole_n1;
  R_abstracted_production_P2: => 10 GFP; ko__P2*ng__P2*Ko__P2*R_abstracted_production_P2_RNAP/(1 + Ko__P2*R_abstracted_production_P2_RNAP + (Kr__Cro_P2*Cro)^nc__Cro_P2);  // modifiers: Cro
    R_abstracted_production_P2_RNAP = 30 u_1_mole_n1; ng__P2 = 2 u_1_mole_n1; Ko__P2 = 0.033 u_1_mole_n1; ko__P2 = 0.05 u_1_second_n1; nc__Cro_P2 = 2 dimensionless; Kr__Cro_P2 = 0.5 u_1_mole_n1;
  R_abstracted_production_Promoter_Cro: => 10 Cro; ko__Promoter_Cro*ng__Promoter_Cro*Ko__Promoter_Cro*R_abstracted_production_Promoter_Cro_RNAP/(1 + Ko__Promoter_Cro*R_abstracted_production_Promoter_Cro_RNAP + (Kr__TetR_Promoter_Cro*TetR)^nc__TetR_Promoter_Cro);  // modifiers: TetR
    R_abstracted_production_Promoter_Cro_RNAP = 30 u_1_mole_n1; ng__Promoter_Cro = 2 u_1_mole_n1; Ko__Promoter_Cro = 0.033 u_1_mole_n1; ko__Promoter_Cro = 0.05 u_1_second_n1; nc__TetR_Promoter_Cro = 2 dimensionless; Kr__TetR_Promoter_Cro = 0.5 u_1_mole_n1;

  // Events:
  event0: at (time >= HighTime): TetR = High;
  event1: at (time >= HighTime2): LacI = High;

  // Unit definitions:
  unit u_1_second_n1 = 1 / second;
  unit u_1_mole_n1 = 1 / mole;
end
